// SBML level 3 version 1

model design_model(SigmaA, BO_10845, cell)
  // model units - substance: nano_mole_per_litre, volume: volume

  // Sub-modules:
  BO_2685C1_model: BO_2685_model();
  BO_27783C2_model_BO_2685C1: BO_27783_model();
  BO_32077C3_model_BO_2685C1: BO_32077_model();
  BO_10845_represses_BO_2685_BO_2685C1_model: BO_10845_represses_BO_2685_model();

  // Compartments:
  compartment cell = 1e-15 litre; BO_2685C1_model.cell is cell; BO_27783C2_model_BO_2685C1.cell is cell; BO_32077C3_model_BO_2685C1.cell is cell; BO_10845_represses_BO_2685_BO_2685C1_model.cell is cell;

  // Species:
  species SigmaA in cell = 1000; BO_2685C1_model.SigmaA is SigmaA;
  species mrnaBO_2685C1 in cell = 0; BO_2685C1_model.mRNA is mrnaBO_2685C1; BO_27783C2_model_BO_2685C1.mRNA is mrnaBO_2685C1; BO_10845_represses_BO_2685_BO_2685C1_model.mRNA is mrnaBO_2685C1;
  species BO_2685C1 in cell = 1.660539; BO_2685C1_model.BO_2685 is BO_2685C1; BO_10845_represses_BO_2685_BO_2685C1_model.promoter is BO_2685C1;
  species BO_27783C2 in cell = 1.660539; BO_27783C2_model_BO_2685C1.rbs is BO_27783C2;
  species BO_32077C3 in cell = 1.660539; BO_32077C3_model_BO_2685C1.cds is BO_32077C3;
  species BO_10845 in cell = 0; BO_32077C3_model_BO_2685C1.protein is BO_10845; BO_10845_represses_BO_2685_BO_2685C1_model.inhibitor is BO_10845;

  // Parameters:
  ripsBO_27783C2_mrnaBO_2685C1 = ; BO_27783C2_model_BO_2685C1.rips is ripsBO_27783C2_mrnaBO_2685C1; BO_32077C3_model_BO_2685C1.rips is ripsBO_27783C2_mrnaBO_2685C1;

  // Assignment rules:
  BO_2685C1pFreeCisEntities := BO_27783C2/1.660539*(BO_32077C3/1.660539);

  // Unit definitions:
  unit nano_mole_per_litre = 1e-9 mole;
  unit volume = 1e-15 litre;
  unit per_second = 1 / second;
end

model BO_2685_model(SigmaA, ktr, cell, mRNA, BO_2685, pFreeCisEntities)
  // model units - substance: nano_mole_per_litre, volume: volume

  // Sub-modules:
  pt: promoter_template();

  // Compartments:
  compartment cell = 1e-15 litre; pt.cell is cell;

  // Species:
  species mRNA in cell = 0; pt.mRNA is mRNA;
  species BO_2685 in cell = 1; pt.promoter is BO_2685;
  species SigmaA in cell = 1000; pt.sigmaFactor is SigmaA;

  // Parameters:
  ktr = 0.1; pt.ktr is ktr;
  pFreeCisEntities = 1; pt.pFreeCisEntities is pFreeCisEntities;

  // Unit definitions:
  unit nano_mole_per_litre = 1e-9 mole;
  unit volume = 1e-15 litre;
  unit per_second = 1 / second;
end

model promoter_template(sigmaFactor, ktr, cell, mRNA, kdeg, promoter, pFreeCisEntities)
  // model units - substance: nano_mole_per_litre, volume: volume

  // Sub-modules:
  transcription: transcription_template();
  mrna_degradation: degradation_template();

  // Compartments:
  compartment cell = 1e-15 litre; transcription.cell is cell; mrna_degradation.cell is cell;

  // Species:
  species promoter in cell = 1.6611; transcription.popsSpecies is promoter;
  species mRNA in cell = 0; transcription.mRNA is mRNA; mrna_degradation.species is mRNA;
  species sigmaFactor in cell = 1000; transcription.sigmaFactor is sigmaFactor;

  // Parameters:
  ktr = 0.1; transcription.ktr is ktr;
  kdeg = 0.0058; mrna_degradation.kdeg is kdeg;
  pFreeCisEntities = 1; transcription.pFreeCisEntities is pFreeCisEntities;

  // Unit definitions:
  unit nano_mole_per_litre = 1e-9 mole;
  unit volume = 1e-15 litre;
  unit per_second = 1 / second;
end

model transcription_template(sigmaFactor, ktr, cell, mRNA, popsSpecies, pFreeCisEntities)
  // model units - substance: nano_mole_per_litre, volume: volume

  // Compartments:
  compartment cell = 1e-15 litre;

  // Species:
  species popsSpecies in cell = 1.6611;
  species mRNA in cell = 0;
  species sigmaFactor in cell = 1000;

  // Parameters:
  kmSF = 50;
  ktr = 0.1;
  pFreeCisEntities = 1;

  // Reactions:
  transcription: popsSpecies => popsSpecies + mRNA; cell*popsSpecies*ktr*(sigmaFactor/(sigmaFactor + kmSF))*pFreeCisEntities;  // modifiers: sigmaFactor

  // Unit definitions:
  unit nano_mole_per_litre = 1e-9 mole;
  unit volume = 1e-15 litre;
  unit per_second = 1 / second;
end

model degradation_template(species, cell, kdeg)
  // model units - substance: nano_mole_per_litre, volume: volume

  // Compartments:
  compartment cell = 1e-15 litre;

  // Species:
  species species in cell = 0;

  // Parameters:
  kdeg = 0.0012;

  // Reactions:
  degradation: species => ; cell*species*kdeg;

  // Unit definitions:
  unit nano_mole_per_litre = 1e-9 mole;
  unit volume = 1e-15 litre;
  unit per_second = 1 / second;
end

model BO_27783_model(rips, cell, mRNA, ktl, rbs)
  // model units - substance: nano_mole_per_litre, volume: volume

  // Sub-modules:
  rt: rbs_template();

  // Compartments:
  compartment cell = 1e-15 litre; rt.cell is cell;

  // Species:
  species mRNA in cell = 0; rt.mRNA is mRNA;
  species rbs in cell = 1; rt.rbs is rbs;

  // Parameters:
  ktl = 0.01; rt.ktl is ktl;
  rips = ; rt.rips is rips;

  // Unit definitions:
  unit nano_mole_per_litre = 1e-9 mole;
  unit volume = 1e-15 litre;
  unit per_second = 1 / second;
end

model rbs_template(rips, cell, ktl, mRNA, rbs)
  // model units - substance: nano_mole_per_litre, volume: volume

  // Compartments:
  compartment cell = 1e-15 litre;

  // Species:
  species mRNA in cell = 0;
  species rbs in cell = 1;

  // Parameters:
  ktl = 0.1;

  // Assignment rules:
  rips := ktl*mRNA;

  // Unit definitions:
  unit nano_mole_per_litre = 1e-9 mole;
  unit volume = 1e-15 litre;
  unit per_second = 1 / second;
end

model BO_32077_model(protein, rips, cell, cds)
  // model units - substance: nano_mole_per_litre, volume: volume

  // Sub-modules:
  ct: cds_template();

  // Compartments:
  compartment cell = 1e-15 litre; ct.cell is cell;

  // Species:
  species protein in cell = 0; ct.protein is protein;
  species cds in cell = 1;

  // Parameters:
  rips = ; ct.rips is rips;

  // Unit definitions:
  unit nano_mole_per_litre = 1e-9 mole;
  unit volume = 1e-15 litre;
  unit per_second = 1 / second;
end

model cds_template(protein, rips, cell, kdeg)
  // model units - substance: nano_mole_per_litre, volume: volume

  // Sub-modules:
  cdsproduct_degradation: degradation_template();

  // Compartments:
  compartment cell = 1e-15 litre; cdsproduct_degradation.cell is cell;

  // Species:
  species protein in cell = 0; cdsproduct_degradation.species is protein;

  // Parameters:
  rips = ;
  kdeg = 0.0012; cdsproduct_degradation.kdeg is kdeg;

  // Reactions:
  translation: => protein; cell*rips;

  // Unit definitions:
  unit nano_mole_per_litre = 1e-9 mole;
  unit volume = 1e-15 litre;
  unit per_second = 1 / second;
end

model BO_10845_represses_BO_2685_model(inhibitor, cell, mRNA, promoter)
  // model units - substance: nano_mole_per_litre, volume: volume

  // Sub-modules:
  prt: promoterrepression_template();

  // Compartments:
  compartment cell = 1e-15 litre; prt.cell is cell;

  // Species:
  species mRNA in cell = 0; prt.mRNA is mRNA;
  species inhibitor in cell = 0; prt.activator is inhibitor;
  species promoter in cell = 0; prt.promoter is promoter;

  // Unit definitions:
  unit nano_mole_per_litre = 1e-9 mole;
  unit volume = 1e-15 litre;
  unit per_second = 1 / second;
end

model promoterrepression_template(kb, activator, cell, kf, mRNA, promoter)
  // model units - substance: nano_mole_per_litre, volume: volume

  // Sub-modules:
  binding: binding_template();

  // Compartments:
  compartment cell = 1e-15 litre; binding.cell is cell;

  // Species:
  species promoter in cell = 1.6611; binding.species1 is promoter;
  species activator in cell = 0; binding.species2 is activator;
  species promoterRepressor in cell = 0; binding.complex is promoterRepressor;
  species mRNA in cell = 0;

  // Parameters:
  kf = 0.001; binding.kf is kf;
  kb = 0.5; binding.kb is kb;

  // Unit definitions:
  unit nano_mole_per_litre = 1e-9 mole;
  unit volume = 1e-15 litre;
  unit per_second = 1 / second;
end

model binding_template(species1, complex, kb, cell, kf, species2)
  // model units - substance: nano_mole_per_litre, volume: volume

  // Compartments:
  compartment cell = 1e-15 litre;

  // Species:
  species species1 in cell = 1.6611;
  species species2 in cell = 0;
  species complex in cell = 0;

  // Parameters:
  kf = 0.001;
  kb = 0.5;

  // Reactions:
  binding: species1 + species2 => complex; cell*species1*species2*kf;
  unbinding: complex => species1 + species2; cell*complex*kb;

  // Unit definitions:
  unit nano_mole_per_litre = 1e-9 mole;
  unit volume = 1e-15 litre;
  unit per_second = 1 / second;
end

model main()
  // model units - substance: nano_mole_per_litre, volume: volume

  // Sub-modules:
  design_model: design_model();

  // Compartments:
  compartment cell = 1e-15 litre; design_model.cell is cell;

  // Species:
  species SigmaA in cell = 1000; design_model.SigmaA is SigmaA;
  species BO_10845 in cell = 0; design_model.BO_10845 is BO_10845;

  // Unit definitions:
  unit nano_mole_per_litre = 1e-9 mole;
  unit volume = 1e-15 litre;
  unit per_second = 1 / second;
end
