// SBML level 3 version 1

model tu_model(SigmaA, tf, cell)
  // model units - substance: nano_mole_per_litre, volume: volume

  // Sub-modules:
  prom1C1_model: prom1_model();
  rbs1C2_model_prom1C1: rbs1_model();
  cds1C3_model_prom1C1: cds1_model();
  tf_represses_prom1_prom1C1_model: tf_represses_prom1_model();

  // Compartments:
  compartment cell = 1e-15 litre; prom1C1_model.cell is cell; rbs1C2_model_prom1C1.cell is cell; cds1C3_model_prom1C1.cell is cell; tf_represses_prom1_prom1C1_model.cell is cell;

  // Species:
  species SigmaA in cell = 1000; prom1C1_model.SigmaA is SigmaA;
  species mrnaprom1C1 in cell = 0; prom1C1_model.mRNA is mrnaprom1C1; rbs1C2_model_prom1C1.mRNA is mrnaprom1C1; tf_represses_prom1_prom1C1_model.mRNA is mrnaprom1C1;
  species prom1C1 in cell = 1.660539; prom1C1_model.prom1 is prom1C1; tf_represses_prom1_prom1C1_model.promoter is prom1C1;
  species rbs1C2 in cell = 1.660539; rbs1C2_model_prom1C1.rbs is rbs1C2;
  species cds1C3 in cell = 1.660539; cds1C3_model_prom1C1.cds is cds1C3;
  species tf in cell = 0; cds1C3_model_prom1C1.protein is tf; tf_represses_prom1_prom1C1_model.inhibitor is tf;

  // Parameters:
  ripsrbs1C2_mrnaprom1C1 = ; rbs1C2_model_prom1C1.rips is ripsrbs1C2_mrnaprom1C1; cds1C3_model_prom1C1.rips is ripsrbs1C2_mrnaprom1C1;

  // Assignment rules:
  prom1C1pFreeCisEntities := rbs1C2/1.660539*(cds1C3/1.660539);

  // Unit definitions:
  unit nano_mole_per_litre = 1e-9 mole;
  unit volume = 1e-15 litre;
  unit per_second = 1 / second;
end

model prom1_model(SigmaA, ktr, cell, mRNA, prom1, pFreeCisEntities)
  // model units - substance: nano_mole_per_litre, volume: volume

  // Sub-modules:
  pt: promoter_template();

  // Compartments:
  compartment cell = 1e-15 litre; pt.cell is cell;

  // Species:
  species mRNA in cell = 0; pt.mRNA is mRNA;
  species prom1 in cell = 1; pt.promoter is prom1;
  species SigmaA in cell = 1000; pt.sigmaFactor is SigmaA;

  // Parameters:
  ktr = 0.1; pt.ktr is ktr;
  pFreeCisEntities = 1; pt.pFreeCisEntities is pFreeCisEntities;

  // Unit definitions:
  unit nano_mole_per_litre = 1e-9 mole;
  unit volume = 1e-15 litre;
  unit per_second = 1 / second;
end

model promoter_template(sigmaFactor, ktr, cell, mRNA, kdeg, promoter, pFreeCisEntities)
  // model units - substance: nano_mole_per_litre, volume: volume

  // Sub-modules:
  transcription: transcription_template();
  mrna_degradation: degradation_template();

  // Compartments:
  compartment cell = 1e-15 litre; transcription.cell is cell; mrna_degradation.cell is cell;

  // Species:
  species promoter in cell = 1.6611; transcription.popsSpecies is promoter;
  species mRNA in cell = 0; transcription.mRNA is mRNA; mrna_degradation.species is mRNA;
  species sigmaFactor in cell = 1000; transcription.sigmaFactor is sigmaFactor;

  // Parameters:
  ktr = 0.1; transcription.ktr is ktr;
  kdeg = 0.0058; mrna_degradation.kdeg is kdeg;
  pFreeCisEntities = 1; transcription.pFreeCisEntities is pFreeCisEntities;

  // Unit definitions:
  unit nano_mole_per_litre = 1e-9 mole;
  unit volume = 1e-15 litre;
  unit per_second = 1 / second;
end

model transcription_template(sigmaFactor, ktr, cell, mRNA, popsSpecies, pFreeCisEntities)
  // model units - substance: nano_mole_per_litre, volume: volume

  // Compartments:
  compartment cell = 1e-15 litre;

  // Species:
  species popsSpecies in cell = 1.6611;
  species mRNA in cell = 0;
  species sigmaFactor in cell = 1000;

  // Parameters:
  kmSF = 50;
  ktr = 0.1;
  pFreeCisEntities = 1;

  // Reactions:
  transcription: popsSpecies => popsSpecies + mRNA; cell*popsSpecies*ktr*(sigmaFactor/(sigmaFactor + kmSF))*pFreeCisEntities;  // modifiers: sigmaFactor

  // Unit definitions:
  unit nano_mole_per_litre = 1e-9 mole;
  unit volume = 1e-15 litre;
  unit per_second = 1 / second;
end

model degradation_template(species, cell, kdeg)
  // model units - substance: nano_mole_per_litre, volume: volume

  // Compartments:
  compartment cell = 1e-15 litre;

  // Species:
  species species in cell = 0;

  // Parameters:
  kdeg = 0.0012;

  // Reactions:
  degradation: species => ; cell*species*kdeg;

  // Unit definitions:
  unit nano_mole_per_litre = 1e-9 mole;
  unit volume = 1e-15 litre;
  unit per_second = 1 / second;
end

model rbs1_model(rips, cell, mRNA, ktl, rbs)
  // model units - substance: nano_mole_per_litre, volume: volume

  // Sub-modules:
  rt: rbs_template();

  // Compartments:
  compartment cell = 1e-15 litre; rt.cell is cell;

  // Species:
  species mRNA in cell = 0; rt.mRNA is mRNA;
  species rbs in cell = 1; rt.rbs is rbs;

  // Parameters:
  ktl = 0.01; rt.ktl is ktl;
  rips = ; rt.rips is rips;

  // Unit definitions:
  unit nano_mole_per_litre = 1e-9 mole;
  unit volume = 1e-15 litre;
  unit per_second = 1 / second;
end

model rbs_template(rips, cell, ktl, mRNA, rbs)
  // model units - substance: nano_mole_per_litre, volume: volume

  // Compartments:
  compartment cell = 1e-15 litre;

  // Species:
  species mRNA in cell = 0;
  species rbs in cell = 1;

  // Parameters:
  ktl = 0.1;

  // Assignment rules:
  rips := ktl*mRNA;

  // Unit definitions:
  unit nano_mole_per_litre = 1e-9 mole;
  unit volume = 1e-15 litre;
  unit per_second = 1 / second;
end

model cds1_model(protein, rips, cell, cds)
  // model units - substance: nano_mole_per_litre, volume: volume

  // Sub-modules:
  ct: cds_template();

  // Compartments:
  compartment cell = 1e-15 litre; ct.cell is cell;

  // Species:
  species protein in cell = 0; ct.protein is protein;
  species cds in cell = 1;

  // Parameters:
  rips = ; ct.rips is rips;

  // Unit definitions:
  unit nano_mole_per_litre = 1e-9 mole;
  unit volume = 1e-15 litre;
  unit per_second = 1 / second;
end

model cds_template(protein, rips, cell, kdeg)
  // model units - substance: nano_mole_per_litre, volume: volume

  // Sub-modules:
  cdsproduct_degradation: degradation_template();

  // Compartments:
  compartment cell = 1e-15 litre; cdsproduct_degradation.cell is cell;

  // Species:
  species protein in cell = 0; cdsproduct_degradation.species is protein;

  // Parameters:
  rips = ;
  kdeg = 0.0012; cdsproduct_degradation.kdeg is kdeg;

  // Reactions:
  translation: => protein; cell*rips;

  // Unit definitions:
  unit nano_mole_per_litre = 1e-9 mole;
  unit volume = 1e-15 litre;
  unit per_second = 1 / second;
end

model tf_represses_prom1_model(inhibitor, cell, mRNA, promoter)
  // model units - substance: nano_mole_per_litre, volume: volume

  // Sub-modules:
  prt: promoterrepression_template();

  // Compartments:
  compartment cell = 1e-15 litre; prt.cell is cell;

  // Species:
  species mRNA in cell = 0; prt.mRNA is mRNA;
  species inhibitor in cell = 0; prt.activator is inhibitor;
  species promoter in cell = 0; prt.promoter is promoter;

  // Unit definitions:
  unit nano_mole_per_litre = 1e-9 mole;
  unit volume = 1e-15 litre;
  unit per_second = 1 / second;
end

model promoterrepression_template(kb, activator, cell, kf, mRNA, promoter)
  // model units - substance: nano_mole_per_litre, volume: volume

  // Sub-modules:
  binding: binding_template();

  // Compartments:
  compartment cell = 1e-15 litre; binding.cell is cell;

  // Species:
  species promoter in cell = 1.6611; binding.species1 is promoter;
  species activator in cell = 0; binding.species2 is activator;
  species promoterRepressor in cell = 0; binding.complex is promoterRepressor;
  species mRNA in cell = 0;

  // Parameters:
  kf = 0.001; binding.kf is kf;
  kb = 0.5; binding.kb is kb;

  // Unit definitions:
  unit nano_mole_per_litre = 1e-9 mole;
  unit volume = 1e-15 litre;
  unit per_second = 1 / second;
end

model binding_template(species1, complex, kb, cell, kf, species2)
  // model units - substance: nano_mole_per_litre, volume: volume

  // Compartments:
  compartment cell = 1e-15 litre;

  // Species:
  species species1 in cell = 1.6611;
  species species2 in cell = 0;
  species complex in cell = 0;

  // Parameters:
  kf = 0.001;
  kb = 0.5;

  // Reactions:
  binding: species1 + species2 => complex; cell*species1*species2*kf;
  unbinding: complex => species1 + species2; cell*complex*kb;

  // Unit definitions:
  unit nano_mole_per_litre = 1e-9 mole;
  unit volume = 1e-15 litre;
  unit per_second = 1 / second;
end

model main()
  // model units - substance: nano_mole_per_litre, volume: volume

  // Sub-modules:
  tu_model: tu_model();

  // Compartments:
  compartment cell = 1e-15 litre; tu_model.cell is cell;

  // Species:
  species SigmaA in cell = 1000; tu_model.SigmaA is SigmaA;
  species tf in cell = 0; tu_model.tf is tf;

  // Unit definitions:
  unit nano_mole_per_litre = 1e-9 mole;
  unit volume = 1e-15 litre;
  unit per_second = 1 / second;
end
