// SBML level 3 version 1

model CopyNumbers_ToggleSwitch_Lugagne2_model(SigmaA, LacI_Dimer, LacIProtein, RFPProtein, TetR_Dimer, LacI_Tetramer, IPTG, LacI_IPTG, TetRProtein, TetR_ATC, ATC, GFPProtein, cell)
  // model units - substance: nano_mole_per_litre, volume: volume

  // Sub-modules:
  pLacIC1_model: pLacI_model();
  rbsTetRC2_model_pLacIC1: rbsTetR_model();
  tetRC3_model_pLacIC1: tetR_model();
  rbsGfpC4_model_pLacIC1: rbsGfp_model();
  gfpC5_model_pLacIC1: gfp_model();
  pTetC7_model: pTet_model();
  rbsLacIC8_model_pTetC7: rbsLacI_model();
  lacIC9_model_pTetC7: lacI_model();
  rbsRfpC10_model_pTetC7: rbsRfp_model();
  rfpC11_model_pTetC7: rfp_model();
  LacIProtein_dimerisation_model: dimerisation();
  TetR_Dimer_represses_pTet_pTetC7_model: TetR_Dimer_represses_pTet_model();
  LacI_Tetramer_represses_pLacI_pLacIC1_model: LacI_Tetramer_represses_pLacI_model();
  IPTG_bindsto_LacI_Tetramer_model: IPTG_bindsto_LacI_Tetramer_model();
  LacI_IPTG_degradation_model: degradation_template();
  TetRProtein_dimerisation_model: dimerisation();
  TetR_ATC_degradation_model: degradation_template();
  ATC_bindsto_TetR_Dimer_model: ATC_bindsto_TetR_Dimer_model();
  LacI_Dimer_dimerisation_model: dimerisation();

  // Compartments:
  compartment cell = 1e-15 litre; pLacIC1_model.cell is cell; rbsTetRC2_model_pLacIC1.cell is cell; tetRC3_model_pLacIC1.cell is cell; rbsGfpC4_model_pLacIC1.cell is cell; gfpC5_model_pLacIC1.cell is cell; pTetC7_model.cell is cell; rbsLacIC8_model_pTetC7.cell is cell; lacIC9_model_pTetC7.cell is cell; rbsRfpC10_model_pTetC7.cell is cell; rfpC11_model_pTetC7.cell is cell; LacIProtein_dimerisation_model.cell is cell; TetR_Dimer_represses_pTet_pTetC7_model.cell is cell; LacI_Tetramer_represses_pLacI_pLacIC1_model.cell is cell; IPTG_bindsto_LacI_Tetramer_model.cell is cell; LacI_IPTG_degradation_model.cell is cell; TetRProtein_dimerisation_model.cell is cell; TetR_ATC_degradation_model.cell is cell; ATC_bindsto_TetR_Dimer_model.cell is cell; LacI_Dimer_dimerisation_model.cell is cell;

  // Species:
  species SigmaA in cell = 1000; pLacIC1_model.SigmaA is SigmaA; pTetC7_model.SigmaA is SigmaA;
  species mrnapLacIC1 in cell = 0; pLacIC1_model.mRNA is mrnapLacIC1; rbsTetRC2_model_pLacIC1.mRNA is mrnapLacIC1; rbsGfpC4_model_pLacIC1.mRNA is mrnapLacIC1; LacI_Tetramer_represses_pLacI_pLacIC1_model.mRNA is mrnapLacIC1;
  species pLacIC1 in cell = 16.60539; pLacIC1_model.pLacI is pLacIC1; LacI_Tetramer_represses_pLacI_pLacIC1_model.promoter is pLacIC1;
  species rbsTetRC2 in cell = 16.60539; rbsTetRC2_model_pLacIC1.rbs is rbsTetRC2;
  species tetRC3 in cell = 16.60539; tetRC3_model_pLacIC1.cds is tetRC3;
  species rbsGfpC4 in cell = 16.60539; rbsGfpC4_model_pLacIC1.rbs is rbsGfpC4;
  species gfpC5 in cell = 16.60539; gfpC5_model_pLacIC1.cds is gfpC5;
  species mrnapTetC7 in cell = 0; pTetC7_model.mRNA is mrnapTetC7; rbsLacIC8_model_pTetC7.mRNA is mrnapTetC7; rbsRfpC10_model_pTetC7.mRNA is mrnapTetC7; TetR_Dimer_represses_pTet_pTetC7_model.mRNA is mrnapTetC7;
  species pTetC7 in cell = 16.60539; pTetC7_model.pTet is pTetC7; TetR_Dimer_represses_pTet_pTetC7_model.promoter is pTetC7;
  species rbsLacIC8 in cell = 16.60539; rbsLacIC8_model_pTetC7.rbs is rbsLacIC8;
  species lacIC9 in cell = 16.60539; lacIC9_model_pTetC7.cds is lacIC9;
  species rbsRfpC10 in cell = 16.60539; rbsRfpC10_model_pTetC7.rbs is rbsRfpC10;
  species rfpC11 in cell = 16.60539; rfpC11_model_pTetC7.cds is rfpC11;
  species LacI_Dimer in cell = 0; LacIProtein_dimerisation_model.dimer is LacI_Dimer; LacI_Dimer_dimerisation_model.species is LacI_Dimer;
  species LacIProtein in cell = 0; LacIProtein_dimerisation_model.species is LacIProtein; lacIC9_model_pTetC7.protein is LacIProtein;
  species RFPProtein in cell = 0; rfpC11_model_pTetC7.protein is RFPProtein;
  species TetR_Dimer in cell = 0; TetR_Dimer_represses_pTet_pTetC7_model.inhibitor is TetR_Dimer; TetRProtein_dimerisation_model.dimer is TetR_Dimer; ATC_bindsto_TetR_Dimer_model.reactant is TetR_Dimer;
  species LacI_Tetramer in cell = 0; LacI_Tetramer_represses_pLacI_pLacIC1_model.inhibitor is LacI_Tetramer; IPTG_bindsto_LacI_Tetramer_model.reactant is LacI_Tetramer; LacI_Dimer_dimerisation_model.dimer is LacI_Tetramer;
  species IPTG in cell = 0; IPTG_bindsto_LacI_Tetramer_model.modifier is IPTG;
  species LacI_IPTG in cell = 0; LacI_IPTG_degradation_model.species is LacI_IPTG; IPTG_bindsto_LacI_Tetramer_model.complex is LacI_IPTG;
  species TetRProtein in cell = 0; TetRProtein_dimerisation_model.species is TetRProtein; tetRC3_model_pLacIC1.protein is TetRProtein;
  species TetR_ATC in cell = 0; TetR_ATC_degradation_model.species is TetR_ATC; ATC_bindsto_TetR_Dimer_model.complex is TetR_ATC;
  species ATC in cell = 0; ATC_bindsto_TetR_Dimer_model.modifier is ATC;
  species GFPProtein in cell = 0; gfpC5_model_pLacIC1.protein is GFPProtein;

  // Parameters:
  ripsrbsTetRC2_mrnapLacIC1 = ; rbsTetRC2_model_pLacIC1.rips is ripsrbsTetRC2_mrnapLacIC1; tetRC3_model_pLacIC1.rips is ripsrbsTetRC2_mrnapLacIC1;
  ripsrbsGfpC4_mrnapLacIC1 = ; rbsGfpC4_model_pLacIC1.rips is ripsrbsGfpC4_mrnapLacIC1; gfpC5_model_pLacIC1.rips is ripsrbsGfpC4_mrnapLacIC1;
  ripsrbsLacIC8_mrnapTetC7 = ; rbsLacIC8_model_pTetC7.rips is ripsrbsLacIC8_mrnapTetC7; lacIC9_model_pTetC7.rips is ripsrbsLacIC8_mrnapTetC7;
  ripsrbsRfpC10_mrnapTetC7 = ; rbsRfpC10_model_pTetC7.rips is ripsrbsRfpC10_mrnapTetC7; rfpC11_model_pTetC7.rips is ripsrbsRfpC10_mrnapTetC7;

  // Assignment rules:
  pLacIC1pFreeCisEntities := rbsTetRC2/16.60539*(tetRC3/16.60539)*(rbsGfpC4/16.60539)*(gfpC5/16.60539);
  pTetC7pFreeCisEntities := rbsLacIC8/16.60539*(lacIC9/16.60539)*(rbsRfpC10/16.60539)*(rfpC11/16.60539);

  // Unit definitions:
  unit nano_mole_per_litre = 1e-9 mole;
  unit volume = 1e-15 litre;
  unit per_second = 1 / second;
end

model pLacI_model(SigmaA, ktr, cell, mRNA, pLacI, pFreeCisEntities)
  // model units - substance: nano_mole_per_litre, volume: volume

  // Sub-modules:
  pt: promoter_template();

  // Compartments:
  compartment cell = 1e-15 litre; pt.cell is cell;

  // Species:
  species mRNA in cell = 0; pt.mRNA is mRNA;
  species pLacI in cell = 1; pt.promoter is pLacI;
  species SigmaA in cell = 1000; pt.sigmaFactor is SigmaA;

  // Parameters:
  ktr = 0.03; pt.ktr is ktr;
  pFreeCisEntities = 1; pt.pFreeCisEntities is pFreeCisEntities;

  // Unit definitions:
  unit nano_mole_per_litre = 1e-9 mole;
  unit volume = 1e-15 litre;
  unit per_second = 1 / second;
end

model promoter_template(sigmaFactor, ktr, cell, mRNA, kdeg, promoter, pFreeCisEntities)
  // model units - substance: nano_mole_per_litre, volume: volume

  // Sub-modules:
  transcription: transcription_template();
  mrna_degradation: degradation_template();

  // Compartments:
  compartment cell = 1e-15 litre; transcription.cell is cell; mrna_degradation.cell is cell;

  // Species:
  species promoter in cell = 1.6611; transcription.popsSpecies is promoter;
  species mRNA in cell = 0; transcription.mRNA is mRNA; mrna_degradation.species is mRNA;
  species sigmaFactor in cell = 1000; transcription.sigmaFactor is sigmaFactor;

  // Parameters:
  ktr = 0.1; transcription.ktr is ktr;
  kdeg = 0.0058; mrna_degradation.kdeg is kdeg;
  pFreeCisEntities = 1; transcription.pFreeCisEntities is pFreeCisEntities;

  // Unit definitions:
  unit nano_mole_per_litre = 1e-9 mole;
  unit volume = 1e-15 litre;
  unit per_second = 1 / second;
end

model transcription_template(sigmaFactor, ktr, cell, mRNA, popsSpecies, pFreeCisEntities)
  // model units - substance: nano_mole_per_litre, volume: volume

  // Compartments:
  compartment cell = 1e-15 litre;

  // Species:
  species popsSpecies in cell = 1.6611;
  species mRNA in cell = 0;
  species sigmaFactor in cell = 1000;

  // Parameters:
  kmSF = 50;
  ktr = 0.1;
  pFreeCisEntities = 1;

  // Reactions:
  transcription: popsSpecies => popsSpecies + mRNA; cell*popsSpecies*ktr*(sigmaFactor/(sigmaFactor + kmSF))*pFreeCisEntities;  // modifiers: sigmaFactor

  // Unit definitions:
  unit nano_mole_per_litre = 1e-9 mole;
  unit volume = 1e-15 litre;
  unit per_second = 1 / second;
end

model degradation_template(species, cell, kdeg)
  // model units - substance: nano_mole_per_litre, volume: volume

  // Compartments:
  compartment cell = 1e-15 litre;

  // Species:
  species species in cell = 0;

  // Parameters:
  kdeg = 0.0012;

  // Reactions:
  degradation: species => ; cell*species*kdeg;

  // Unit definitions:
  unit nano_mole_per_litre = 1e-9 mole;
  unit volume = 1e-15 litre;
  unit per_second = 1 / second;
end

model rbsTetR_model(rips, cell, mRNA, ktl, rbs)
  // model units - substance: nano_mole_per_litre, volume: volume

  // Sub-modules:
  rt: rbs_template();

  // Compartments:
  compartment cell = 1e-15 litre; rt.cell is cell;

  // Species:
  species mRNA in cell = 0; rt.mRNA is mRNA;
  species rbs in cell = 1; rt.rbs is rbs;

  // Parameters:
  ktl = 0.0195; rt.ktl is ktl;
  rips = ; rt.rips is rips;

  // Unit definitions:
  unit nano_mole_per_litre = 1e-9 mole;
  unit volume = 1e-15 litre;
  unit per_second = 1 / second;
end

model rbs_template(rips, cell, ktl, mRNA, rbs)
  // model units - substance: nano_mole_per_litre, volume: volume

  // Compartments:
  compartment cell = 1e-15 litre;

  // Species:
  species mRNA in cell = 0;
  species rbs in cell = 1;

  // Parameters:
  ktl = 0.1;

  // Assignment rules:
  rips := ktl*mRNA;

  // Unit definitions:
  unit nano_mole_per_litre = 1e-9 mole;
  unit volume = 1e-15 litre;
  unit per_second = 1 / second;
end

model tetR_model(protein, rips, cell, cds)
  // model units - substance: nano_mole_per_litre, volume: volume

  // Sub-modules:
  ct: cds_template();

  // Compartments:
  compartment cell = 1e-15 litre; ct.cell is cell;

  // Species:
  species protein in cell = 0; ct.protein is protein;
  species cds in cell = 1;

  // Parameters:
  rips = ; ct.rips is rips;

  // Unit definitions:
  unit nano_mole_per_litre = 1e-9 mole;
  unit volume = 1e-15 litre;
  unit per_second = 1 / second;
end

model cds_template(protein, rips, cell, kdeg)
  // model units - substance: nano_mole_per_litre, volume: volume

  // Sub-modules:
  cdsproduct_degradation: degradation_template();

  // Compartments:
  compartment cell = 1e-15 litre; cdsproduct_degradation.cell is cell;

  // Species:
  species protein in cell = 0; cdsproduct_degradation.species is protein;

  // Parameters:
  rips = ;
  kdeg = 0.0012; cdsproduct_degradation.kdeg is kdeg;

  // Reactions:
  translation: => protein; cell*rips;

  // Unit definitions:
  unit nano_mole_per_litre = 1e-9 mole;
  unit volume = 1e-15 litre;
  unit per_second = 1 / second;
end

model rbsGfp_model(rips, cell, mRNA, ktl, rbs)
  // model units - substance: nano_mole_per_litre, volume: volume

  // Sub-modules:
  rt: rbs_template();

  // Compartments:
  compartment cell = 1e-15 litre; rt.cell is cell;

  // Species:
  species mRNA in cell = 0; rt.mRNA is mRNA;
  species rbs in cell = 1; rt.rbs is rbs;

  // Parameters:
  ktl = 0.01; rt.ktl is ktl;
  rips = ; rt.rips is rips;

  // Unit definitions:
  unit nano_mole_per_litre = 1e-9 mole;
  unit volume = 1e-15 litre;
  unit per_second = 1 / second;
end

model gfp_model(protein, rips, cell, cds)
  // model units - substance: nano_mole_per_litre, volume: volume

  // Sub-modules:
  ct: cds_template();

  // Compartments:
  compartment cell = 1e-15 litre; ct.cell is cell;

  // Species:
  species protein in cell = 0; ct.protein is protein;
  species cds in cell = 1;

  // Parameters:
  rips = ; ct.rips is rips;

  // Unit definitions:
  unit nano_mole_per_litre = 1e-9 mole;
  unit volume = 1e-15 litre;
  unit per_second = 1 / second;
end

model pTet_model(SigmaA, ktr, cell, mRNA, pTet, pFreeCisEntities)
  // model units - substance: nano_mole_per_litre, volume: volume

  // Sub-modules:
  pt: promoter_template();

  // Compartments:
  compartment cell = 1e-15 litre; pt.cell is cell;

  // Species:
  species mRNA in cell = 0; pt.mRNA is mRNA;
  species pTet in cell = 1; pt.promoter is pTet;
  species SigmaA in cell = 1000; pt.sigmaFactor is SigmaA;

  // Parameters:
  ktr = 0.05; pt.ktr is ktr;
  pFreeCisEntities = 1; pt.pFreeCisEntities is pFreeCisEntities;

  // Unit definitions:
  unit nano_mole_per_litre = 1e-9 mole;
  unit volume = 1e-15 litre;
  unit per_second = 1 / second;
end

model rbsLacI_model(rips, cell, mRNA, ktl, rbs)
  // model units - substance: nano_mole_per_litre, volume: volume

  // Sub-modules:
  rt: rbs_template();

  // Compartments:
  compartment cell = 1e-15 litre; rt.cell is cell;

  // Species:
  species mRNA in cell = 0; rt.mRNA is mRNA;
  species rbs in cell = 1; rt.rbs is rbs;

  // Parameters:
  ktl = 0.015; rt.ktl is ktl;
  rips = ; rt.rips is rips;

  // Unit definitions:
  unit nano_mole_per_litre = 1e-9 mole;
  unit volume = 1e-15 litre;
  unit per_second = 1 / second;
end

model lacI_model(protein, rips, cell, cds)
  // model units - substance: nano_mole_per_litre, volume: volume

  // Sub-modules:
  ct: cds_template();

  // Compartments:
  compartment cell = 1e-15 litre; ct.cell is cell;

  // Species:
  species protein in cell = 0; ct.protein is protein;
  species cds in cell = 1;

  // Parameters:
  rips = ; ct.rips is rips;

  // Unit definitions:
  unit nano_mole_per_litre = 1e-9 mole;
  unit volume = 1e-15 litre;
  unit per_second = 1 / second;
end

model rbsRfp_model(rips, cell, mRNA, ktl, rbs)
  // model units - substance: nano_mole_per_litre, volume: volume

  // Sub-modules:
  rt: rbs_template();

  // Compartments:
  compartment cell = 1e-15 litre; rt.cell is cell;

  // Species:
  species mRNA in cell = 0; rt.mRNA is mRNA;
  species rbs in cell = 1; rt.rbs is rbs;

  // Parameters:
  ktl = 0.01; rt.ktl is ktl;
  rips = ; rt.rips is rips;

  // Unit definitions:
  unit nano_mole_per_litre = 1e-9 mole;
  unit volume = 1e-15 litre;
  unit per_second = 1 / second;
end

model rfp_model(protein, rips, cell, cds)
  // model units - substance: nano_mole_per_litre, volume: volume

  // Sub-modules:
  ct: cds_template();

  // Compartments:
  compartment cell = 1e-15 litre; ct.cell is cell;

  // Species:
  species protein in cell = 0; ct.protein is protein;
  species cds in cell = 1;

  // Parameters:
  rips = ; ct.rips is rips;

  // Unit definitions:
  unit nano_mole_per_litre = 1e-9 mole;
  unit volume = 1e-15 litre;
  unit per_second = 1 / second;
end

model dimerisation(dimer, kb, cell, kf, species)
  // model units - substance: nano_mole_per_litre, volume: volume

  // Sub-modules:
  dt: dimerisation_template();

  // Compartments:
  compartment cell = 1e-15 litre; dt.cell is cell;

  // Species:
  species species in cell = 0; dt.species1 is species;
  species dimer in cell = 0; dt.complex is dimer;

  // Parameters:
  kf = 0.001; dt.kf is kf;
  kb = 0.2; dt.kb is kb;

  // Unit definitions:
  unit nano_mole_per_litre = 1e-9 mole;
  unit volume = 1e-15 litre;
  unit per_second = 1 / second;
end

model dimerisation_template(complex, kb, cell, kf, species1)
  // model units - substance: nano_mole_per_litre, volume: volume

  // Sub-modules:
  dimer_degradation: degradation_template();

  // Compartments:
  compartment cell = 1e-15 litre; dimer_degradation.cell is cell;

  // Species:
  species species1 in cell = 1.6611;
  species complex in cell = 0; dimer_degradation.species is complex;

  // Parameters:
  kf = 0.0001;
  kb = 0.5;

  // Reactions:
  binding: 2 species1 => complex; cell*species1*species1*kf;
  unbinding: complex => 2 species1; cell*complex*kb;

  // Unit definitions:
  unit nano_mole_per_litre = 1e-9 mole;
  unit volume = 1e-15 litre;
  unit per_second = 1 / second;
end

model TetR_Dimer_represses_pTet_model(kb, inhibitor, cell, kf, mRNA, promoter)
  // model units - substance: nano_mole_per_litre, volume: volume

  // Sub-modules:
  prt: promoterrepression_template();

  // Compartments:
  compartment cell = 1e-15 litre; prt.cell is cell;

  // Species:
  species mRNA in cell = 0; prt.mRNA is mRNA;
  species inhibitor in cell = 0; prt.activator is inhibitor;
  species promoter in cell = 0; prt.promoter is promoter;

  // Parameters:
  kf = 0.025; prt.kf is kf;
  kb = 0.2; prt.kb is kb;

  // Unit definitions:
  unit nano_mole_per_litre = 1e-9 mole;
  unit volume = 1e-15 litre;
  unit per_second = 1 / second;
end

model promoterrepression_template(kb, activator, cell, kf, mRNA, promoter)
  // model units - substance: nano_mole_per_litre, volume: volume

  // Sub-modules:
  binding: binding_template();

  // Compartments:
  compartment cell = 1e-15 litre; binding.cell is cell;

  // Species:
  species promoter in cell = 1.6611; binding.species1 is promoter;
  species activator in cell = 0; binding.species2 is activator;
  species promoterRepressor in cell = 0; binding.complex is promoterRepressor;
  species mRNA in cell = 0;

  // Parameters:
  kf = 0.001; binding.kf is kf;
  kb = 0.5; binding.kb is kb;

  // Unit definitions:
  unit nano_mole_per_litre = 1e-9 mole;
  unit volume = 1e-15 litre;
  unit per_second = 1 / second;
end

model binding_template(species1, complex, kb, cell, kf, species2)
  // model units - substance: nano_mole_per_litre, volume: volume

  // Compartments:
  compartment cell = 1e-15 litre;

  // Species:
  species species1 in cell = 1.6611;
  species species2 in cell = 0;
  species complex in cell = 0;

  // Parameters:
  kf = 0.001;
  kb = 0.5;

  // Reactions:
  binding: species1 + species2 => complex; cell*species1*species2*kf;
  unbinding: complex => species1 + species2; cell*complex*kb;

  // Unit definitions:
  unit nano_mole_per_litre = 1e-9 mole;
  unit volume = 1e-15 litre;
  unit per_second = 1 / second;
end

model LacI_Tetramer_represses_pLacI_model(kb, inhibitor, cell, kf, mRNA, promoter)
  // model units - substance: nano_mole_per_litre, volume: volume

  // Sub-modules:
  prt: promoterrepression_template();

  // Compartments:
  compartment cell = 1e-15 litre; prt.cell is cell;

  // Species:
  species mRNA in cell = 0; prt.mRNA is mRNA;
  species inhibitor in cell = 0; prt.activator is inhibitor;
  species promoter in cell = 0; prt.promoter is promoter;

  // Parameters:
  kf = 0.06; prt.kf is kf;
  kb = 0.2; prt.kb is kb;

  // Unit definitions:
  unit nano_mole_per_litre = 1e-9 mole;
  unit volume = 1e-15 litre;
  unit per_second = 1 / second;
end

model IPTG_bindsto_LacI_Tetramer_model(kb, complex, cell, kf, reactant, modifier)
  // model units - substance: nano_mole_per_litre, volume: volume

  // Sub-modules:
  binding: bindingwithmodifier_template();

  // Compartments:
  compartment cell = 1e-15 litre; binding.cell is cell;

  // Species:
  species modifier in cell = 1.6611; binding.modifier is modifier;
  species reactant in cell = 0; binding.reactant is reactant;
  species complex in cell = 0; binding.complex is complex;

  // Parameters:
  kf = 0.2; binding.kf is kf;
  kb = 0.27; binding.kb is kb;

  // Unit definitions:
  unit nano_mole_per_litre = 1e-9 mole;
  unit volume = 1e-15 litre;
  unit per_second = 1 / second;
end

model bindingwithmodifier_template(complex, kb, cell, kf, reactant, modifier)
  // model units - substance: nano_mole_per_litre, volume: volume

  // Compartments:
  compartment cell = 1e-15 litre;

  // Species:
  species modifier in cell = 1.6611;
  species reactant in cell = 0;
  species complex in cell = 0;

  // Parameters:
  kf = 0.001;
  kb = 0.5;

  // Reactions:
  binding: reactant => complex; cell*modifier*reactant*kf;  // modifiers: modifier
  unbinding: complex => reactant; cell*complex*kb;

  // Unit definitions:
  unit nano_mole_per_litre = 1e-9 mole;
  unit volume = 1e-15 litre;
  unit per_second = 1 / second;
end

model ATC_bindsto_TetR_Dimer_model(kb, complex, cell, kf, reactant, modifier)
  // model units - substance: nano_mole_per_litre, volume: volume

  // Sub-modules:
  binding: bindingwithmodifier_template();

  // Compartments:
  compartment cell = 1e-15 litre; binding.cell is cell;

  // Species:
  species modifier in cell = 1.6611; binding.modifier is modifier;
  species reactant in cell = 0; binding.reactant is reactant;
  species complex in cell = 0; binding.complex is complex;

  // Parameters:
  kf = 0.25; binding.kf is kf;
  kb = 0.27; binding.kb is kb;

  // Unit definitions:
  unit nano_mole_per_litre = 1e-9 mole;
  unit volume = 1e-15 litre;
  unit per_second = 1 / second;
end

model main()
  // model units - substance: nano_mole_per_litre, volume: volume

  // Sub-modules:
  CopyNumbers_ToggleSwitch_Lugagne2_model: CopyNumbers_ToggleSwitch_Lugagne2_model();

  // Compartments:
  compartment cell = 1e-15 litre; CopyNumbers_ToggleSwitch_Lugagne2_model.cell is cell;

  // Species:
  species SigmaA in cell = 1000; CopyNumbers_ToggleSwitch_Lugagne2_model.SigmaA is SigmaA;
  species LacI_Dimer in cell = 0; CopyNumbers_ToggleSwitch_Lugagne2_model.LacI_Dimer is LacI_Dimer;
  species LacIProtein in cell = 0; CopyNumbers_ToggleSwitch_Lugagne2_model.LacIProtein is LacIProtein;
  species RFPProtein in cell = 0; CopyNumbers_ToggleSwitch_Lugagne2_model.RFPProtein is RFPProtein;
  species TetR_Dimer in cell = 0; CopyNumbers_ToggleSwitch_Lugagne2_model.TetR_Dimer is TetR_Dimer;
  species LacI_Tetramer in cell = 0; CopyNumbers_ToggleSwitch_Lugagne2_model.LacI_Tetramer is LacI_Tetramer;
  species IPTG in cell = 0; CopyNumbers_ToggleSwitch_Lugagne2_model.IPTG is IPTG;
  species LacI_IPTG in cell = 0; CopyNumbers_ToggleSwitch_Lugagne2_model.LacI_IPTG is LacI_IPTG;
  species TetRProtein in cell = 0; CopyNumbers_ToggleSwitch_Lugagne2_model.TetRProtein is TetRProtein;
  species TetR_ATC in cell = 0; CopyNumbers_ToggleSwitch_Lugagne2_model.TetR_ATC is TetR_ATC;
  species ATC in cell = 0; CopyNumbers_ToggleSwitch_Lugagne2_model.ATC is ATC;
  species GFPProtein in cell = 0; CopyNumbers_ToggleSwitch_Lugagne2_model.GFPProtein is GFPProtein;

  // Assignment rules:
  RFP_GFP := RFPProtein/GFPProtein;

  // Events:
  IPTG_setevent0: at (time == 1), persistent=false: IPTG = 50;
  atC_unsetevent0: at (time == 0), persistent=false: ATC = 0;
  IPTG_unsetevent1: at (time == 7200), persistent=false: IPTG = 0;
  atC_setevent1: at (time == 7201), persistent=false: ATC = 50;
  IPTG_setevent2: at (time == 9001), persistent=false: IPTG = 50;
  atC_unsetevent2: at (time == 9000), persistent=false: ATC = 0;
  IPTG_unsetevent3: at (time == 16200), persistent=false: IPTG = 0;
  atC_setevent3: at (time == 16201), persistent=false: ATC = 50;
  IPTG_setevent4: at (time == 18001), persistent=false: IPTG = 50;
  atC_unsetevent4: at (time == 18000), persistent=false: ATC = 0;
  IPTG_unsetevent5: at (time == 25200), persistent=false: IPTG = 0;
  atC_setevent5: at (time == 25201), persistent=false: ATC = 50;
  IPTG_setevent6: at (time == 27001), persistent=false: IPTG = 50;
  atC_unsetevent6: at (time == 27000), persistent=false: ATC = 0;
  IPTG_unsetevent7: at (time == 34200), persistent=false: IPTG = 0;
  atC_setevent7: at (time == 34201), persistent=false: ATC = 50;
  IPTG_setevent8: at (time == 36001), persistent=false: IPTG = 50;
  atC_unsetevent8: at (time == 36000), persistent=false: ATC = 0;
  IPTG_unsetevent9: at (time == 43200), persistent=false: IPTG = 0;
  atC_setevent9: at (time == 43201), persistent=false: ATC = 50;
  IPTG_setevent10: at (time == 45001), persistent=false: IPTG = 50;
  atC_unsetevent10: at (time == 45000), persistent=false: ATC = 0;
  IPTG_unsetevent11: at (time == 52200), persistent=false: IPTG = 0;
  atC_setevent11: at (time == 52201), persistent=false: ATC = 50;
  IPTG_unsetevent12: at (time == 54000), persistent=false: IPTG = 25;
  atC_setevent12: at (time == 54000), persistent=false: ATC = 25;

  // Unit definitions:
  unit nano_mole_per_litre = 1e-9 mole;
  unit volume = 1e-15 litre;
  unit per_second = 1 / second;
end
